New Line.q110 bus1=grid bus2=bus110 phases=3 switch=yes length=1 units=m r1=0.0001 x1=0.0001
New Transformer.t110 phases=3 windings=2 xhl=12 %loadloss=0.6
~ wdg=1 bus=bus110 conn=wye kv=110 kva=25000
~ wdg=2 bus=bus10 conn=wye kv=10 kva=25000
New LineCode.mv nphases=3 r1=0.2 x1=0.3 units=km
New Line.sw_cable_a bus1=bus10 bus2=cable_a phases=3 switch=yes length=1 units=m r1=0.0001 x1=0.0001
New Line.cable bus1=cable_a bus2=cable_b phases=3 length=1 units=km linecode=mv
New Line.sw_cable_b bus1=cable_b bus2=section phases=3 switch=yes length=1 units=m r1=0.0001 x1=0.0001
New Transformer.t04 phases=3 windings=2 xhl=6 %loadloss=1
~ wdg=1 bus=section conn=delta kv=10 kva=1600
~ wdg=2 bus=lv conn=wye kv=0.4 kva=1600
New Line.mcc_feeder bus1=lv bus2=mcc phases=3 length=0.05 units=km r1=0.02 x1=0.03
New LoadShape.shift npts=2 interval=0.5 mult=[1 1.5]
New Load.plant bus1=mcc phases=3 conn=wye kv=0.4 kw=400 kvar=120 duty=shift
New Capacitor.bank bus1=bus10 phases=3 conn=wye kv=10 kvar=300
New Generator.aux bus1=mcc phases=3 kv=0.4 kw=30 kvar=0 model=1
New Storage.bess phases=3 bus1=mcc conn=wye kv=0.4 kwrated=100 kwhrated=200 %stored=60 %effcharge=90 %effdischarge=90 kw=1
New PVSystem.roof phases=3 bus1=section conn=wye kv=10 kva=50 pmpp=20
New Vsource.reserve bus1=reserve10 basekv=10 pu=1 r1=0.05 x1=0.3 angle=0
New Line.ats bus1=reserve10 bus2=section phases=3 switch=yes length=1 units=m r1=0.0001 x1=0.0001
